# OpenSim document version 40000
AnalyzeTool IK_gait:
  model_file: /Users/zacharyroth/Repos/MuscleRedundancySolver/Examples/Example_EMGWalking/ScaledModel.osim
  replace_force_set: false
  results_directory: /Users/zacharyroth/Repos/MuscleRedundancySolver/Examples/Example_EMGWalking/Results_LowerLimb_EMGconstrained/MuscleAnalysis
  output_precision: 8
  initial_time: 1.2
  final_time: 2.3
  solve_for_equilibrium_for_auxiliary_states: false
  maximum_number_of_integrator_steps: 20000
  maximum_integrator_step_size: 1
  minimum_integrator_step_size: 1e-8
  integrator_error_tolerance: 1e-5
  coordinates_file: /Users/zacharyroth/Repos/MuscleRedundancySolver/Examples/Example_EMGWalking/IK_gait.mot
  lowpass_cutoff_frequency_for_coordinates: -1
  AnalysisSet Analyses:
    MuscleAnalysis: start_time=1.2 end_time=2.3 step_interval=1 in_degrees=true muscle_list=all
        moment_arm_coordinate_list=(ankle_angle_l knee_angle_l hip_flexion_l) compute_moments=true
