# OpenSim document version 40000
AnalyzeTool IK_06:
  model_file: /Users/zacharyroth/Data/synergies-data/Subject1/Models/GEN_scaled.osim
  replace_force_set: false
  results_directory: /Users/zacharyroth/Data/synergies-data/Subject1/Movements/gait_normal/Calculated-Activations/MuscleAnalysis
  output_precision: 8
  initial_time: 2.84
  final_time: 3.67
  solve_for_equilibrium_for_auxiliary_states: false
  maximum_number_of_integrator_steps: 20000
  maximum_integrator_step_size: 1
  minimum_integrator_step_size: 1e-8
  integrator_error_tolerance: 1e-5
  coordinates_file: /Users/zacharyroth/Data/synergies-data/Subject1/Movements/gait_normal/IK/IK_06.mot
  lowpass_cutoff_frequency_for_coordinates: -1
  AnalysisSet Analyses:
    MuscleAnalysis: start_time=2.84 end_time=3.67 step_interval=1 in_degrees=true muscle_list=all
        moment_arm_coordinate_list=(ankle_angle_r knee_angle_r hip_flexion_r hip_adduction_r hip_rotation_r)
        compute_moments=true
